## Initialization ---------------------------------------------------

units real
dimension 3

atom_style full
bond_style harmonic
angle_style harmonic
pair_style lj/cut/tip4p/cut 1 2 1 1 0.1546 12.0 8.5

boundary p p p

## System Definition ------------------------------------------------

lattice diamond 3.57
region box block -10 10 -10 10 -10 10

create_box 2 box &
bond/types 1 &
angle/types 1 &
extra/bond/per/atom 2 &
extra/angle/per/atom 1 &
extra/special/per/atom 2

region fluid block -10 10 -10 10 -7 7
lattice sc 4.0
molecule h2o TIP4P2005.txt
create_atoms 0 region fluid mol h2o 1

group gh2o type 1 2

## Atom Information--------------------------------------------------

mass 1 15.9994
mass 2 1.008

pair_coeff 1 1 0.185199 3.1589
pair_coeff 2 2 0.0 0.0

bond_coeff 1 0 0.9572
angle_coeff 1 0 104.52

## Simulation Settings-----------------------------------------------

dump dmp all atom 100 dump.lammpstrj
write_data initial.lammps

fix mynve all nve
compute tliq gh2o temp
fix lng all langevin 300.0 300.0 100.0 1
fix_modify lng temp tliq

fix shk gh2o shake 1.0e-4 200 0 b 1 a 1
fix	myrct all recenter NULL NULL INIT

timestep 0.05
thermo 100
run 10000
