## Initialization ---------------------------------------------------

units real
dimension 3

molecule h2o TIP4P2005.txt

atom_style full
bond_style harmonic
angle_style harmonic
pair_style lj/cut/tip4p/cut 1 2 1 1 0.1546 12.0 8.5

boundary p p p

## System Definition ------------------------------------------------

region box block -10 10 -10 10 -10 10
lattice sc 4.0

create_box 2 box &
bond/types 1 &
angle/types 1 &
extra/bond/per/atom 2 &
extra/angle/per/atom 1 &
extra/special/per/atom 2

create_atoms 0 region box mol h2o 1

group gh2o type 1 2

## Atom Information -------------------------------------------------

# H2O
mass 1 15.9994 # O
mass 2 1.008 # H

pair_coeff 1 1 0.185199 3.1589 # eps (kcal/mol), sigma
pair_coeff 2 2 0.0 0.0

bond_coeff 1 0 0.9572
angle_coeff 1 0 104.52

neigh_modify every 1 delay 5 check yes

## Simulation Settings ----------------------------------------------

write_data initial.lammpstrj

fix mynve gh2o nve
compute tliq gh2o temp
fix lng gh2o langevin 300.0 300.0 100.0 1
fix_modify lng temp tliq
fix shk gh2o shake 1.0e-4 200 0 b 1 a 1

#dump dmp all atom 100 dump.msd1.lammpstrj

# Equilibrate
thermo 10
#run 5000

# Attempt to calculate diffusivity

#reset_timestep 0
#undump dmp

compute cc gh2o chunk/atom molecule ids once
# defines a computation that calculates an integer chunk ID for each atom in the group
# values of chunk IDs are determined by the style of chunk, based on atom type or molecule ID
# chunks are collections of atoms (e.g. molecules, spatial bins, atoms with similar values (coordination number or potential energy))

compute md gh2o msd/chunk cc # row = Nchunk, col = [dx2 dy2 dz2 dx2+dy2+dz2] Angstroms^2
variable avg equal ave(c_md[4])
#fix vt gh2o ave/time 1 1 1 v_avg file test.out mode scalar
fix vt gh2o vector 1 v_avg
variable dms equal slope(f_vt)/(6*10*dt)

thermo_style custom step temp v_avg v_dms

dump dmp all atom 100 dump.msd.lammpstrj

run 10000
